f(x) := (cos(x)/(x^2 + x + 1))*e^cos(x)
x0 := 5
h0 := 10^-3
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f1t(x) := d/dx(f(x)) → -e^cos(x)*sin(x)/(x^2 + x + 1) - e^cos(x)*cos(x)*(2*x + 1)/(x^2 + x + 1)^2 - e^cos(x)*cos(x)*sin(x)/(x^2 + x + 1)
f1(x, h) := (f(x + h) - f(x - h))/(2*h)
ε1(h) := |(f1(x0, h) - f1t(x0))/f1t(x0)|
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x1min := 8.32e-6
ε1(x1min) = 2.34883e-12
f12(x, h) := (f(x) - f(x - h))/h
ε12(h) := |(f12(x0, h) - f1t(x0))/f1t(x0)|
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x12min := 2.463e-8
ε12(x12min) = 3.43381e-11
f2t(x) := d^2/dx^2(f(x)) → 2*e^cos(x)*sin(x)^2/(x^2 + x + 1) - 2*e^cos(x)*cos(x)/(x^2 + x + 1)^2 - e^cos(x)*cos(x)^2/(x^2 + x + 1) - e^cos(x)*cos(x)/(x^2 + x + 1) + 2*e^cos(x)*cos(x)*(2*x + 1)^2/(x^2 + x + 1)^3 + e^cos(x)*cos(x)*sin(x)^2/(x^2 + x + 1) + 2*e^cos(x)*sin(x)*(2*x + 1)/(x^2 + x + 1)^2 + 2*e^cos(x)*cos(x)*sin(x)*(2*x + 1)/(x^2 + x + 1)^2
f2(x, h) := (f(x + h) - 2*f(x) + f(x - h))/h^2
ε2(h) := |(f2(x0, h) - f2t(x0))/f2t(x0)|
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x2min := 9.12e-5
ε2(x2min) = 1.14567e-9
f3(x, h) := (f(x + 2*h) - 2*f(x + h) + 2*f(x - h) - f(x - 2*h))/(2*h^3)
f3t(x) := d^3/dx^3(f(x)) → e^cos(x)*sin(x)/(x^2 + x + 1) + 6*e^cos(x)*sin(x)/(x^2 + x + 1)^2 - 3*e^cos(x)*sin(x)^3/(x^2 + x + 1) + 3*e^cos(x)*cos(x)^2*(2*x + 1)/(x^2 + x + 1)^2 - 6*e^cos(x)*cos(x)*(2*x + 1)^3/(x^2 + x + 1)^4 - 6*e^cos(x)*sin(x)^2*(2*x + 1)/(x^2 + x + 1)^2 - 6*e^cos(x)*sin(x)*(2*x + 1)^2/(x^2 + x + 1)^3 + 3*e^cos(x)*cos(x)^2*sin(x)/(x^2 + x + 1) - e^cos(x)*cos(x)*sin(x)^3/(x^2 + x + 1) + 3*e^cos(x)*cos(x)*(2*x + 1)/(x^2 + x + 1)^2 + 4*e^cos(x)*cos(x)*(2*x + 1)/(x^2 + x + 1)^3 + 2*e^cos(x)*cos(x)*(8*x + 4)/(x^2 + x + 1)^3 + 7*e^cos(x)*cos(x)*sin(x)/(x^2 + x + 1) + 6*e^cos(x)*cos(x)*sin(x)/(x^2 + x + 1)^2 - 3*e^cos(x)*cos(x)*sin(x)^2*(2*x + 1)/(x^2 + x + 1)^2 - 6*e^cos(x)*cos(x)*sin(x)*(2*x + 1)^2/(x^2 + x + 1)^3
ε3(h) := |(f3(x0, h) - f3t(x0))/f3t(x0)|
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x3min := 0.0009
ε3(x3min) = 1.38114e-11
f4(x, h) := (f(x + 2*h) - 4*f(x + h) + 6*f(x) - 4*f(x - h) + f(x - 2*h))/h^4
f4t(x) := d^4/dx^4(f(x))  # error: Возвращенный символьный результат слишком велик для отображения, но его можно использовать в последующих вычислениях, \если присвоить функции или переменной.
ε4(h) := |(f4(x0, h) - f4t(x0))/f4t(x0)|
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x4min := 0.00136
ε4(x4min) = 1.80345e-6
