f(x) := (cos(x)/(x^2 + x + 1))*e^cos(x)
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a := 0
b := 2
n1 := 100
n2 := 200
n3 := 400
h1 := (b - a)/n1
h2 := (b - a)/n2
h3 := (b - a)/n3
i := 0 .. n1
j := 0 .. n2
k := 0 .. n3
t0 := a
tn := b
t1[i] := t0 + i*h1
t2[j] := t0 + j*h2
t3[k] := t0 + k*h3
# Метод Эйлера
pe := 1
xe1[0] := a
xe2[0] := a
xe3[0] := a
xe1[i + 1] := xe1[i] + h1*f(xe1[i])
xe2[j + 1] := xe2[j] + h2*f(xe2[j])
xe3[k + 1] := xe3[k] + h3*f(xe3[k])
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# Метод Рунге-Кутты
prk := 4
xrk1[0] := a
xrk2[0] := a
xrk3[0] := a
k1(l) := f(l)
k2(l, h) := f(l + h/2*k1(l))
k3(l, h) := f(l + h/2*k2(l, h))
k4(l, h) := f(l + h*k3(l, h))
kh(l, h) := h*(k1(l) + 2*k2(l, h) + 2*k3(l, h) + k4(l, h))/6
xrk1[i + 1] := xrk1[i] + kh(xrk1[i], h1)
xrk2[j + 1] := xrk2[j] + kh(xrk2[j], h2)
xrk3[k + 1] := xrk3[k] + kh(xrk3[k], h3)
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# Индивидуальный метод
K[2] = h*f(x[m] + K[1]*1/4)  # error: Эта переменная не определена.
K[1] = h*f[m]  # error: Эта переменная не определена.
x[m + 1] = x[m] + (1/6*K)[1] + 4/6*K[3] + 1/6*K4  # error: Эта переменная не определена.
K[4] = h*f(x[m] + K[2]*1/2)  # error: Эта переменная не определена.
K[3] = h*f(x[m] + K[2]*1/2)  # error: Эта переменная не определена.
x1[0] := a
x2[0] := a
x3[0] := a
p := 4
x1[i + 1] := x1[i] + (1/6)*h1*f(x1[i]) + (4/6)*h1*f(x1[i] + (1/2)*h1*f(x1[i] + (1/4)*h1*f(x1[i]))) + (1/6)*h1*f(x1[i] + (1/2)*h2*f(x1[i] + (h1*f(x1[i])*(1/4))))
x2[j + 1] := x2[j] + (1/6)*h2*f(x2[j]) + (4/6)*h2*f(x2[j] + (1/2)*h2*f(x2[j] + (1/4)*h2*f(x2[j]))) + (1/6)*h2*f(x2[j] + (1/2)*h2*f(x2[j] + (h2*f(x2[j])*(1/4))))
x3[k + 1] := x3[k] + (1/6)*h3*f(x3[k]) + (4/6)*h3*f(x3[k] + (1/2)*h3*f(x3[k] + (1/4)*h3*f(x3[k]))) + (1/6)*h3*f(x3[k] + (1/2)*h3*f(x3[k] + (h3*f(x3[k])*(1/4))))
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ee12 := |xe1[n1] - xe2[n2]|*2^pe/(2^pe - 1) = 0.00437747
ee23 := |xe2[n2] - xe3[n3]|*2^pe/(2^pe - 1) = 0.00217916
erk12 := |xrk1[n1] - xrk2[n2]|*2^prk/(2^prk - 1) = 6.81594e-9
erk23 := |xrk2[n2] - xrk3[n3]|*2^prk/(2^prk - 1) = 4.27131e-10
e12 := |x1[n1] - x2[n2]|*2^p/(2^p - 1) = 0.000781205
e23 := |x2[n2] - x3[n3]|*2^p/(2^p - 1) = 0.000193226
