f(x) := (cos(x)/(x^2 + x + 1))*e^cos(x)
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a := 0
b := 2
m := 8
n := 2^m
h := (b - a)/n
i := 0 .. n
x1[i] := a + i*h
y1[i] := f(x1[i]) + rnd(5)
st := 10
xx(st) := regress(x1, y1, st)
ff(x, st) := interp(xx(st), x1, y1, x)
Графики
j := 0 .. n
tx[j] := min(x1) + j*(max(x1) - min(x1))/(n + 1)
ff1(j, st) := ff(tx[j], st)
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Погрешности
DD[j] := |y1[j] - ff1(j, st)|
DDD(n) := sum((y1[k] - ff1(k, st))^2, k = 0 .. n)/(n - st)
DDD(n) = 2.0592
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sr := mean(DD) = 1.20685
sm := max(DD) = 2.92439
