# Преобразования Фурье
f(x) := x^2*(x^3 + cos(2*x))/(x^2 + 1)
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a := 0
b := 2
m := 8
n := 2^m
nn := n - 1
ii := 0 .. nn
h := (b - a)/nn
i := 0 .. n
xi[ii] := a + ii*h
yi[ii] := f(xi[ii]) + rnd(5)
A := fft(yi)
k := 5
j := 0 .. n/2
g[j] := if(j ≤ k, A[j], 0)
# Количество гармоник = 5 (малое число)
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f := ifft(g)
i := 0 .. n
k := 100
j := 0 .. n/2
g[j] := if(j ≤ k, A[j], 0)
i := 0 .. n
f(x) := x^2*(cos(2*x) + x^3)/(x^2 + 1)
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# Количество гармоник великов, графики почти совпали
# Коэффициенты Фурье
i := 0 .. k
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# Приближение ступенчатой функции
ii1 := 0 .. 50
yi1[ii1] := 10
ii2 := 51 .. 255
yi1[ii2] := 20
A2 := fft(yi1)
k := 15
j := 0 .. n/2
g[j] := if(j ≤ k, A2[j], 0)
f1 := ifft(g)
i := 0 .. n
# количество гармоник 15
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# количество гармоник 100
k := 150
j := 0 .. n/2
g[j] := if(j ≤ k, A2[j], 0)
f1 := ifft(g)
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